<?xml version="1.0" encoding="ISO-8859-1"?>
<neuroml xmlns="http://www.neuroml.org/schema/neuroml2" xmlns:xsi="http://www.w3.org/2001/XMLSchema-instance" xsi:schemaLocation="http://www.neuroml.org/schema/neuroml2 https://raw.github.com/NeuroML/NeuroML2/development/Schemas/NeuroML2/NeuroML_v2beta4.xsd">

    <ionChannel id="Na" type="NaChannelPR" conductance="0 pS" />

    <ComponentType name="NaChannelPR" extends="baseIonChannelPR">

        <!-- channelDensity only needs fopen (dimensionless)-->

        <Dynamics>

            <StateVariable name="hs" dimension="none"/>

            <DerivedVariable name="Vs" dimension="voltage" value="v"/>

            <DerivedVariable name="alphams_Vs" dimension="none" value="0.32*(-46.9-Vs/MVOLT)/(exp((-46.9-Vs/MVOLT)/4.0)-1.0)"/>
            <DerivedVariable name="betams_Vs" dimension="none" value="0.28*(Vs/MVOLT+19.9)/(exp((Vs/MVOLT+19.9)/5.0)-1.0)"/>
            <DerivedVariable name="Minfs_Vs" dimension="none" value="alphams_Vs/(alphams_Vs+betams_Vs)"/>
            <DerivedVariable name="alphahs_Vs" dimension="none" value="0.128*exp((-43.0-Vs/MVOLT)/18.0)"/>
            <DerivedVariable name="betahs_Vs" dimension="none" value="4.0/(1.0+exp((-20.0-Vs/MVOLT)/5.0))"/>

            <TimeDerivative variable="hs" value="(alphahs_Vs-(alphahs_Vs+betahs_Vs)*hs) / MSEC"/>

            <DerivedVariable name="fopen" dimension="none" value="(Minfs_Vs^2)*hs" exposure="fopen"/>

            <DerivedVariable name="g" value="conductance" exposure="g" dimension="conductance" />

        </Dynamics>

    </ComponentType>

</neuroml>
