<Lems>

    <!-- Specify which component to run -->
    <Target component="sim1"/>

    <!-- Include core NeuroML2 ComponentType definitions -->
    <Include file="Cells.xml"/>
    <Include file="Networks.xml"/>
    <Include file="Simulation.xml"/>

    <Include file="pinskyRinzelCA3Cell.xml"/>

    <pinskyRinzelCA3Cell id="prA" iSoma="0.75 uA_per_cm2" gNmda="0 mS_per_cm2" gc="2.1 mS_per_cm2" qd0="0"
                         gLs="0.1 mS_per_cm2" gLd="0.1 mS_per_cm2" gNa="30 mS_per_cm2" gKdr="15 mS_per_cm2"
                         gCa="10 mS_per_cm2" gKahp="0.8 mS_per_cm2" gKC="15 mS_per_cm2" eNa="60 mV" eCa="80 mV" eK="-75 mV" eL="-60 mV"
                         pp="0.5" cm="3 uF_per_cm2" alphac="2" betac="0.1"
                         iDend="0 uA_per_cm2" gAmpa="0 mS_per_cm2" />

    <network id="net1">
        <population id="pr1pop" component="prA" size="1"/>
    </network>

    <Simulation id="sim1" length="130ms" step="0.01ms" target="net1">

        <Display id="Fig3VsVd" title="Figure 3 Vs and Vd" timeScale="1ms" units="mV"  xmin="80" xmax="130" ymin="-70" ymax="30">
            <Line id="Vs" quantity="pr1pop[0]/Vs" scale="0.001" units="mV"  color="#00FF00" timeScale="1ms"/>
            <Line id="Vd" quantity="pr1pop[0]/Vd" scale="0.001" units="mV"  color="#FF00FF" timeScale="1ms"/>
        </Display>

        <Display id="Fig3Ca" title="Figure 3 Ca" timeScale="1ms" xmin="80" xmax="130" ymin="-20" ymax="420">
            <Line id="Ca" quantity="pr1pop[0]/Cad" scale="1"  color="#000000" timeScale="1ms"/>
        </Display>

        <OutputFile id="of0" fileName="Fig3_Vs.dat">
            <OutputColumn id="v0" quantity="pr1pop[0]/Vs" />
        </OutputFile>

        <OutputFile id="of1" fileName="Fig3_Vd.dat">
            <OutputColumn id="v0" quantity="pr1pop[0]/Vd" />
        </OutputFile>

    </Simulation>

</Lems>
