<Lems>

  <!-- Specify which component to run -->
  <Target component="sim1"/>

  <!-- Include core NeuroML2 ComponentType definitions -->
  <Include file="Cells.xml"/>
  <Include file="Networks.xml"/>
  <Include file="Simulation.xml"/>

  <Include file="pinskyRinzelCA3CellDL.xml"/>

  <pinskyRinzelCA3CellDL id="pr2A" Isoma="0.75" Idend="0" gc="2.1" qd0="0"
                        gLs="0.1" gLd="0.1" gNa="30" gKdr="15"
                       gCa="10" gKahp="0.8" gKC="15" VNa="60" VCa="80" VK="-75" VL="-60"
                       pp="0.5" Cm="3" alphac="2" betac="0.1"
                       gnmda="0" gampa="0" />

  <pinskyRinzelCA3CellDL id="pr2B" Isoma="-0.5" Idend="2.49" gc="2.1" qd0="0"
                        gLs="0.1" gLd="0.1" gNa="30" gKdr="15"
                       gCa="10" gKahp="0.8" gKC="15" VNa="60" VCa="80" VK="-75" VL="-60"
                       pp="0.5" Cm="3" alphac="2" betac="0.1"
                       gnmda="0" gampa="0" />

  <pinskyRinzelCA3CellDL id="pr2C" Isoma="2.5" Idend="0" gc="2.1" qd0="0"
                        gLs="0.1" gLd="0.1" gNa="30" gKdr="15"
                        gCa="10" gKahp="0.8" gKC="15" VNa="60" VCa="80" VK="-75" VL="-60"
                        pp="0.5" Cm="3" alphac="2" betac="0.1"
                        gnmda="0" gampa="0" />

  <pinskyRinzelCA3CellDL id="pr2D" Isoma="2.5" Idend="0" gc="10.5" qd0="0"
                       gLs="0.1" gLd="0.1" gNa="30" gKdr="15"
                       gCa="10" gKahp="0.8" gKC="15" VNa="60" VCa="80" VK="-75" VL="-60"
                       pp="0.5" Cm="3" alphac="2" betac="0.1"
                       gnmda="0" gampa="0" />

  <pinskyRinzelCA3CellDL id="pr2E" Isoma="-0.5" Idend="2" gc="1.425" qd0="0.14"
                       gLs="0.1" gLd="0.1" gNa="30" gKdr="15"
                       gCa="10" gKahp="0.8" gKC="15" VNa="60" VCa="80" VK="-75" VL="-60"
                       pp="0.5" Cm="3" alphac="2" betac="0.1"
                       gnmda="0" gampa="0" />

  <network id="net1">
    <population id="prApop" component="pr2A" size="1"/>
    <population id="prBpop" component="pr2B" size="1"/>
    <population id="prCpop" component="pr2C" size="1"/>
    <population id="prDpop" component="pr2D" size="1"/>
    <population id="prEpop" component="pr2E" size="1"/>
  </network>

  <Simulation id="sim1" length="1500ms" step="0.005ms" target="net1">

    <Display id="Fig2AVs"  title="Figure 2A somatic input, left: Vs" timeScale="1ms"        xmin="-100" xmax="1600" ymin="-70" ymax="40">
      <Line id="Vs" quantity="prApop[0]/Vs" scale="1"  color="#000000" timeScale="1ms"/>
    </Display>

    <Display id="Fig2ACaq" title="Figure 2A somatic input, right: Ca, q" timeScale="1ms"    xmin="-100" xmax="1600" ymin="-0.05" ymax=".6">
      <Line id="Ca" quantity="prApop[0]/Cad" scale="666.7"  color="#000000" timeScale="1ms"/>
      <Line id="q"  quantity="prApop[0]/qd" scale="1"  color="#FF0000" timeScale="1ms"/>
    </Display>

    <OutputFile id="Fig2A_Vs" fileName="Fig2A_Vs.dat">
      <OutputColumn id="v0" quantity="prApop[0]/Vs" />
    </OutputFile>

    <Display id="Fig2BVs"  title="Figure 2B dendritic input, left: Vs" timeScale="1ms"        xmin="-100" xmax="1600" ymin="-70" ymax="40">
      <Line id="Vs" quantity="prBpop[0]/Vs" scale="1"  color="#000000" timeScale="1ms"/>
    </Display>

    <Display id="Fig2BCaq" title="Figure 2B dendritic input, right: Ca, q" timeScale="1ms"    xmin="-100" xmax="1600" ymin="-0.05" ymax=".6">
      <Line id="Ca" quantity="prBpop[0]/Cad" scale="666.7"  color="#000000" timeScale="1ms"/>
      <Line id="q"  quantity="prBpop[0]/qd" scale="1"  color="#FF0000" timeScale="1ms"/>
    </Display>

    <OutputFile id="Fig2B_Vs" fileName="Fig2B_Vs.dat">
      <OutputColumn id="v0" quantity="prBpop[0]/Vs" />
    </OutputFile>

    <Display id="Fig2CVs"  title="Figure 2C strong somatic input, left: Vs" timeScale="1ms" xmin="-100" xmax="1600" ymin="-70" ymax="40">
      <Line id="Vs" quantity="prCpop[0]/Vs" scale="1"  color="#000000" timeScale="1ms"/>
    </Display>

    <Display id="Fig2CCaq" title="Figure 2C somatic input, right: Ca, q" timeScale="1ms"    xmin="-100" xmax="1600" ymin="-0.05" ymax=".6">
      <Line id="Ca" quantity="prCpop[0]/Cad" scale="666.7"  color="#000000" timeScale="1ms"/>
      <Line id="q"  quantity="prCpop[0]/qd" scale="1"  color="#FF0000" timeScale="1ms"/>
    </Display>

    <OutputFile id="Fig2C_Vs" fileName="Fig2C_Vs.dat">
      <OutputColumn id="v0" quantity="prCpop[0]/Vs" />
    </OutputFile>

    <Display id="Fig2DVs"  title="Figure 2D strong somatic input, tight coupling, left: Vs" timeScale="1ms" xmin="-100" xmax="1600" ymin="-70" ymax="40">
      <Line id="Vs" quantity="prDpop[0]/Vs" scale="1"  color="#000000" timeScale="1ms"/>
    </Display>

    <Display id="Fig2DCaq" title="Figure 2D somatic input, tight coupling, right: Ca, q" timeScale="1ms"    xmin="-100" xmax="1600" ymin="-0.05" ymax=".6">
      <Line id="Ca" quantity="prDpop[0]/Cad" scale="666.7"  color="#000000" timeScale="1ms"/>
      <Line id="q"  quantity="prDpop[0]/qd" scale="1"  color="#FF0000" timeScale="1ms"/>
    </Display>

    <OutputFile id="Fig2D_Vs" fileName="Fig2D_Vs.dat">
      <OutputColumn id="v0" quantity="prDpop[0]/Vs" />
    </OutputFile>

    <Display id="Fig2EVs"  title="Figure 2E dendritic input, weak coupling, left: Vs" timeScale="1ms" xmin="-100" xmax="1600" ymin="-70" ymax="40">
      <Line id="Vs" quantity="prEpop[0]/Vs" scale="1"  color="#000000" timeScale="1ms"/>
    </Display>

    <Display id="Fig2ECaq" title="Figure 2E dendritic input, weak coupling, right: Ca, q" timeScale="1ms"    xmin="-100" xmax="1600" ymin="-0.05" ymax=".6">
      <Line id="Ca" quantity="prEpop[0]/Cad" scale="666.7"  color="#000000" timeScale="1ms"/>
      <Line id="q"  quantity="prEpop[0]/qd" scale="1"  color="#FF0000" timeScale="1ms"/>
    </Display>

    <OutputFile id="Fig2E_Vs" fileName="Fig2E_Vs.dat">
      <OutputColumn id="v0" quantity="prEpop[0]/Vs" />
    </OutputFile>

  </Simulation>

</Lems>
