<Lems>

    <!-- Specify which component to run -->
    <Target component="sim1"/>

    <!-- Include core NeuroML2 ComponentType definitions -->
    <Include file="Cells.xml"/>
    <Include file="Networks.xml"/>
    <Include file="Simulation.xml"/>

    <Include file="pinskyRinzelCA3CellDL.xml"/>

    <pinskyRinzelCA3CellDL id="prA" Isoma="0.75" gnmda="0" gc="2.1" qd0="0"
			 gLs="0.1" gLd="0.1" gNa="30" gKdr="15"
                         gCa="10" gKahp="0.8" gKC="15" VNa="60" VCa="80" VK="-75" VL="-60"
                         pp="0.5" Cm="3" alphac="2" betac="0.1"
			 Idend="0" gampa="0" />

    <network id="net1">
        <population id="pr1pop" component="prA" size="1"/>
    </network>

    <Simulation id="sim1" length="130ms" step="0.01ms" target="net1">

        <Display id="Fig3VsVd" title="Figure 3 Vs and Vd" timeScale="1ms" xmin="80" xmax="130" ymin="-70" ymax="30">
            <Line id="Vs" quantity="pr1pop[0]/Vs" scale="1"  color="#00FF00" timeScale="1ms"/>
            <Line id="Vd" quantity="pr1pop[0]/Vd" scale="1"  color="#FF00FF" timeScale="1ms"/>
            <Line id="V" quantity="pr1pop[0]/V" scale="1"  color="#FF0000" timeScale="1ms"/>
        </Display>

        <Display id="Fig3Ca" title="Figure 3 Ca" timeScale="1ms" xmin="80" xmax="130" ymin="-20" ymax="420">
            <Line id="Ca" quantity="pr1pop[0]/Cad" scale="1"  color="#000000" timeScale="1ms"/>
        </Display>

        <OutputFile id="of0" fileName="Fig3_Vs.dat">
            <OutputColumn id="v0" quantity="pr1pop[0]/Vs" />
        </OutputFile>

        <OutputFile id="of1" fileName="Fig3_Vd.dat">
            <OutputColumn id="v0" quantity="pr1pop[0]/Vd" />
        </OutputFile>

    </Simulation>

</Lems>
