<Lems xmlns="http://www.neuroml.org/lems/0.7.3"
      xmlns:xsi="http://www.w3.org/2001/XMLSchema-instance"
      xsi:schemaLocation="http://www.neuroml.org/lems/0.7.3 LEMS_v0.7.3.xsd">

<!--

    Definition in LEMS of the Pinsky Rinzel CA3 model

    Note: Not yet complete!
    Contact p.gleeson =at= ucl.ac.uk if you are interested in using/contributing to this model.

-->

<ComponentType name="pinskyRinzelCA3CellDL"
    extends="baseCellMembPotDL"
    description="Preliminary version of Pinsky Rinzel model. Still in development!!">

    <!-- baseCellMembPotDL compatibility
    <Exposure name="V" dimension="none"/> -->

    <Parameter name="Isoma" dimension="none"/>
    <Parameter name="gLs" dimension="none"/>
    <Parameter name="gLd" dimension="none"/>
    <Parameter name="gNa" dimension="none"/>
    <Parameter name="gKdr" dimension="none"/>
    <Parameter name="gCa" dimension="none"/>
    <Parameter name="gKahp" dimension="none"/>
    <Parameter name="gKC" dimension="none"/>
    <Parameter name="VNa" dimension="none"/>
    <Parameter name="VCa" dimension="none"/>
    <Parameter name="VK" dimension="none"/>
    <Parameter name="VL" dimension="none"/>
    <Parameter name="gc" dimension="none"/>
    <Parameter name="pp" dimension="none"/>
    <Parameter name="Cm" dimension="none"/>
    <Parameter name="alphac" dimension="none"/>
    <Parameter name="betac" dimension="none"/>

    <Parameter name="Idend" dimension="none"/>
    <Parameter name="gnmda" dimension="none"/>
    <Parameter name="gampa" dimension="none"/>
    <Parameter name="qd0" dimension="none"/>

    <!-- Needed to ensure Vs, Vd remain dimensionless... -->
    <Constant name="MSEC" dimension="time" value="1ms"/>

    <Constant name="Smax" dimension="none" value="125.0"/>
    <Constant name="Vsyn" dimension="none" value="60.0"/>

    <Exposure name="Vs" dimension="none"/>
    <Exposure name="Vd" dimension="none"/>

    <Exposure name="Cad" dimension="none"/>
    <Exposure name="hs" dimension="none"/>
    <Exposure name="ns" dimension="none"/>
    <Exposure name="sd" dimension="none"/>
    <Exposure name="cd" dimension="none"/>
    <Exposure name="qd" dimension="none"/>
    <Exposure name="Si" dimension="none"/>
    <Exposure name="Wi" dimension="none"/>
    <Exposure name="Sisat" dimension="none"/>

    <Exposure name="ICad" dimension="none"/>

    <Dynamics>

        <StateVariable name="Vs" dimension="none" exposure="Vs"/>
        <StateVariable name="Vd" dimension="none" exposure="Vd"/>
        <StateVariable name="Cad" dimension="none" exposure="Cad"/>
        <StateVariable name="hs" dimension="none" exposure="hs"/>
        <StateVariable name="ns" dimension="none" exposure="ns"/>
        <StateVariable name="sd" dimension="none" exposure="sd"/>
        <StateVariable name="cd" dimension="none" exposure="cd"/>
        <StateVariable name="qd" dimension="none" exposure="qd"/>

        <!-- baseCellMembPot compatibility -->
        <DerivedVariable name="V" dimension="none" value="Vs" exposure="V"/>

        <!-- Synaptic Dynamics -->
        <StateVariable name="Si" dimension="none" exposure="Si"/>
        <StateVariable name="Wi" dimension="none" exposure="Wi"/>
        <StateVariable name="Sisat" dimension="none" exposure="Sisat"/>

        <DerivedVariable name="ICad" dimension="none" exposure="ICad" value="gCa*sd*sd*(Vd-VCa)"/>

        <DerivedVariable name="alphams_Vs" dimension="none" value="0.32*(-46.9-Vs)/(exp((-46.9-Vs)/4.0)-1.0)"/>
        <DerivedVariable name="betams_Vs" dimension="none" value="0.28*(Vs+19.9)/(exp((Vs+19.9)/5.0)-1.0)"/>
        <DerivedVariable name="Minfs_Vs" dimension="none" value="alphams_Vs/(alphams_Vs+betams_Vs)"/>

        <DerivedVariable name="alphans_Vs" dimension="none" value="0.016*(-24.9-Vs)/(exp((-24.9-Vs)/5.0)-1.0)"/>
        <DerivedVariable name="betans_Vs" dimension="none" value="0.25*exp(-1.0-0.025*Vs)"/>

        <DerivedVariable name="alphahs_Vs" dimension="none" value="0.128*exp((-43.0-Vs)/18.0)"/>
        <DerivedVariable name="betahs_Vs" dimension="none" value="4.0/(1.0+exp((-20.0-Vs)/5.0))"/>

        <DerivedVariable name="alphasd_Vd" dimension="none" value="1.6/(1.0+exp(-0.072*(Vd-5.0)))"/>
        <DerivedVariable name="betasd_Vd" dimension="none" value="0.02*(Vd+8.9)/(exp((Vd+8.9)/5.0)-1.0)"/>

        <ConditionalDerivedVariable name="alphaqd" dimension="none">
            <Case condition="0.00002*Cad .gt. 0.01" value="0.01"/>
            <Case value="0.00002*Cad"/>
        </ConditionalDerivedVariable>

        <DerivedVariable name="betaqd" dimension="none" value="0.001"/>

        <ConditionalDerivedVariable name="chid" dimension="none">
            <Case condition="Cad/250 .gt. 1" value="1"/>
            <Case value="Cad/250"/>
        </ConditionalDerivedVariable>

        <!--<DerivedVariable name="V" dimension="none" exposure="V" value="Vd"/>-->

        <!--
            alphacd(v)=(1.0-heav(v+10.0))*exp((v+50.0)/11-(v+53.5)/27)/18.975+heav(v+10.0)*2.0*exp((-53.5-v)/27.0)

                exp((v+50.0)/11-(v+53.5)/27)/18.975    (1.0-heav(v+10.0))     so if v <-10

                2.0*exp((-53.5-v)/27.0)                heav(v+10.0)           so if v >=-10

            betacd(v)=   (1.0-heav(v+10.0))*(2.0*exp((-53.5-v)/27.0)-alphacd(v))

                (2.0*exp((-53.5-v)/27.0)-alphacd(v))   (1.0-heav(v+10.0))     so if v <-10

        -->

        <ConditionalDerivedVariable name="alphacd_Vd" dimension="none">
            <Case condition="Vd .lt. -10" value="exp((Vd+50.0)/11-(Vd+53.5)/27)/18.975"/>
            <Case value="2.0*exp((-53.5-Vd)/27.0)"/>
        </ConditionalDerivedVariable>

        <ConditionalDerivedVariable name="betacd_Vd" dimension="none">
            <Case condition="Vd .lt. -10" value="(2.0*exp((-53.5-Vd)/27.0)-alphacd_Vd)"/>
            <Case value="0"/>
        </ConditionalDerivedVariable>

        <TimeDerivative variable="Vs" value="(-gLs*(Vs-VL)-gNa*(Minfs_Vs^2)*hs*(Vs-VNa)-gKdr*ns*(Vs-VK)+(gc/pp)*(Vd-Vs)+Isoma/pp)/ (Cm * MSEC)"/>
        <TimeDerivative variable="Vd" value="(Idend/(1.0-pp)-Isyn/(1.0-pp)-gLd*(Vd-VL)-ICad-gKahp*qd*(Vd-VK)-gKC*cd*chid*(Vd-VK)+(gc*(Vs-Vd))/(1.0-pp))/ (Cm * MSEC)"/>
        <TimeDerivative variable="Cad" value="(-0.13*ICad-0.075*Cad) / MSEC"/>
        <TimeDerivative variable="hs" value="(alphahs_Vs-(alphahs_Vs+betahs_Vs)*hs) / MSEC"/>
        <TimeDerivative variable="ns" value="(alphans_Vs-(alphans_Vs+betans_Vs)*ns) / MSEC"/>
        <TimeDerivative variable="sd" value="(alphasd_Vd-(alphasd_Vd+betasd_Vd)*sd) / MSEC"/>
        <TimeDerivative variable="cd" value="(alphacd_Vd-(alphacd_Vd+betacd_Vd)*cd) / MSEC"/>
        <TimeDerivative variable="qd" value="(alphaqd-(alphaqd+betaqd)*qd) / MSEC"/>

	<!-- Synaptic Dynamics -->
	<TimeDerivative variable="Si" value="-Si/150.0" />
	<TimeDerivative variable="Wi" value="-Wi/2.0" />

	<ConditionalDerivedVariable name="Sisat" dimension="none" exposure="Sisat">
            <Case condition="Si .gt. Smax" value="Smax"/>
            <Case value="Si"/>
        </ConditionalDerivedVariable>

	<DerivedVariable name="Iampa" dimension="none" value="gampa*Wi*(Vd-Vsyn)"/>
	<DerivedVariable name="Inmda" dimension="none" value="gnmda*Sisat*(Vd-Vsyn)/(1.0+0.28*exp(-0.062*(Vd-60.0)))"/>
	<DerivedVariable name="Isyn" dimension="none" value="Iampa+Inmda"/>

        <OnStart>
            <StateAssignment variable="Vs" value="VL"/>
            <StateAssignment variable="Vd" value="VL"/>
	    <StateAssignment variable="qd" value="qd0" />
        </OnStart>

    </Dynamics>

</ComponentType>

</Lems>
