<Lems>

    <!-- Specify which component to run -->
    <Target component="sim1"/>

    <!-- Include core NeuroML2 ComponentType definitions -->
    <Include file="Cells.xml"/>
    <Include file="Networks.xml"/>
    <Include file="Simulation.xml"/>

    <Include file="PinskyRinzelCA3DL.xml"/>

    <pinskyRinzelCA3Cell id="prA" Is="0.75 uA" gnmda="0 mS" gc="2.1 mS" qd0="0"
                         gLs="0.1 mS" gLd="0.1 mS" gNa="30 mS" gKdr="15 mS"
                         gCa="10 mS" gKahp="0.8 mS" gKC="15 mS" VNa="60 mV" VCa="80 mV" VK="-75 mV" VL="-60 mV"
                         pp="0.5" Cm="3 uF" alphac="2" betac="0.1"
                         Id="0 uA" gampa="0 mS" />

    <network id="net1">
        <population id="pr1pop" component="prA" size="1"/>
    </network>

    <Simulation id="sim1" length="50ms" step="0.01ms" target="net1">

        <Display id="Fig3VsVd" title="Figure 3 Vs and Vd" timeScale="1ms" units="mV"  xmin="-20" xmax="70" ymin="-70" ymax="30">
            <Line id="Vs" quantity="pr1pop[0]/Vs" scale="0.001" units="mV"  color="#00FF00" timeScale="1ms"/>
            <Line id="Vd" quantity="pr1pop[0]/Vd" scale="0.001" units="mV"  color="#FF00FF" timeScale="1ms"/>
        </Display>

        <Display id="Fig3Ca" title="Figure 3 Ca" timeScale="1ms" xmin="-5" xmax="70" ymin="-20" ymax="420">
            <Line id="Ca" quantity="pr1pop[0]/Cad" scale="1"  color="#000000" timeScale="1ms"/>
        </Display>
    </Simulation>

</Lems>
